# OpenSim document version 30000
MarkerSet:
  Marker Sternum: torso (0.1 0.24 0)
  Marker R.Acromium: torso (-0.03 0.42 0.15)
  Marker L.Acromium: torso (-0.03 0.42 -0.15)
  Marker T10: torso (-0.1 0.22 0)
  Marker RSJC: humerus_r (0 0 0)
  Marker R.Bicep: humerus_r (-0.0405282 -0.161111 0.000373811)
  Marker REJC: humerus_r (0.00584 -0.28069 -0.0002)
  Marker RFAsuperior: ulna_r (-0.02 -0.15 0.03)
  Marker R.Wrist.Med: radius_r (-0.01531 -0.23272 -0.01839)
  Marker R.Wrist.Lat: radius_r (-0.00316 -0.22312 0.04988)
  Marker LSJC: humerus_l (0 0 0)
  Marker L.Bicep: humerus_l (-0.04 -0.15 0)
  Marker LEJC: humerus_l (0.00584 -0.28069 0.0002)
  Marker L.Wrist.Med: radius_l (-0.01531 -0.23272 0.01839)
  Marker L.Wrist.Lat: radius_l (-0.00316 -0.22312 -0.04988)
  Marker R.ASIS: pelvis (0.02 0.03 0.128)
  Marker L.ASIS: pelvis (0.02 0.03 -0.128)
  Marker V.Sacral: pelvis (-0.16 0.04 0)
  Marker LHJC: pelvis (-0.0707 -0.0661 0.0835)
  Marker RHJC: pelvis (-0.0707 -0.0661 -0.0835)
  Marker R.Thigh.Upper: femur_r (0.018 -0.15 0.064)
  Marker R.Thigh.Rear: femur_r (0.08 -0.23 0.0047)
  Marker R.Thigh.Front: femur_r (0.01 -0.3 0.06)
  Marker R.Knee.Lat: femur_r (0 -0.404 0.05)
  Marker R.Knee.Med: femur_r (0 -0.404 -0.05)
  Marker RKJC: femur_r (0 -0.404 0)
  Marker R.Shank.Upper: tibia_r (0.005 -0.11 0.05)
  Marker R.Shank.Rear: tibia_r (0.05 -0.18 0)
  Marker R.Ankle.Lat: tibia_r (-0.005 -0.41 0.053)
  Marker R.Ankle.Med: tibia_r (0.006 -0.3888 -0.038)
  Marker RAJC: tibia_r (0 -0.4 0)
  Marker R.Heel: calcn_r (-0.02 0.02 0)
  Marker R.Toe.Tip: calcn_r (0.21698 0.00221261 -0.0198741)
  Marker R.Midfoot.Lat: calcn_r (0.12 0.02 0.05)
  Marker R.Midfoot.Sup: calcn_r (0.0747513 0.0231579 0.0412013)
  Marker R.Toe.Lat: calcn_r (0.171847 0.0208944 -0.0302431)
  Marker R.Toe.Med: calcn_r (0.127437 0.028442 -0.0271721)
  Marker L.Thigh.Upper: femur_l (0.018 -0.15 -0.064)
  Marker L.Thigh.Rear: femur_l (0.08 -0.23 -0.0047)
  Marker L.Thigh.Front: femur_l (0.01 -0.3 -0.06)
  Marker L.Knee.Lat: femur_l (0 -0.404 -0.05)
  Marker L.Knee.Med: femur_l (0 -0.404 0.05)
  Marker LKJC: femur_l (0 -0.404 0)
  Marker L.Shank.Upper: tibia_l (0.005 -0.11 -0.05)
  Marker L.Shank.Rear: tibia_l (0.05 -0.18 0)
  Marker L.Ankle.Lat: tibia_l (-0.005 -0.41 -0.053)
  Marker LAJC: tibia_l (0 -0.4 0)
  Marker L.Heel: calcn_l (-0.02 0.02 0)
  Marker L.Toe.Tip: calcn_l (0.215592 0.00306645 0.0227681)
  Marker L.Midfoot.Lat: calcn_l (0.12 0.02 -0.05)
  Marker L.Midfoot.Sup: calcn_l (0.0729116 0.0212648 -0.040521)
  Marker L.Toe.Lat: calcn_l (0.169714 0.0185986 0.0279716)
  Marker L.Toe.Med: calcn_l (0.124394 0.0349087 0.0247687)
