# OpenSim document version 30000
Model Tensegrity_Knee_REV_3:
  length_units: meters
  force_units: N
  gravity: 0 -9.80665 0
  credits:
    Erik Jung, Lawrence Ngo, Nicholas Cessna affiliation with University of California, Santa Cruz. Created 2017.
  BodySet:
    Body ground: mass=0 mass_center=(0 0 0) inertia_xx=0 inertia_yy=0 inertia_zz=0 meshes=cube.vtp
    Body steel_beam: mass=0 mass_center=(0 0 0) inertia_xx=1 inertia_yy=1 inertia_zz=1 meshes=cylinder.vtp
      WeldJoint steel_beam_to_ground: parent_body=ground location_in_parent=(0 2 0) orientation_in_parent=(1.5708 0 0)
          location=(0 0 0)
    Body quad_stick: mass=0.002131884 mass_center=(0 0 0) inertia_xx=1 inertia_yy=1 inertia_zz=1 meshes=cylinder.vtp
      WeldJoint quad_stick_to_beam: parent_body=steel_beam location_in_parent=(0 0.25 0)
          orientation_in_parent=(1.5708 0 1.5708) location=(0 0 0)
    Body hamstring_stick: mass=0.002131884 mass_center=(0 0 0) inertia_xx=1 inertia_yy=1 inertia_zz=1
        meshes=cylinder.vtp
      WeldJoint hamstring_stick_to_beam: parent_body=steel_beam location_in_parent=(0 -0.25 0)
          orientation_in_parent=(1.5708 0 1.5708) location=(0 0 0)
    Body spine_stick: mass=0.003719457 mass_center=(0 0 0) inertia_xx=1 inertia_yy=1 inertia_zz=1 meshes=cylinder.vtp
      WeldJoint spine_stick_to_ground: parent_body=steel_beam location_in_parent=(0 0 0.15)
          orientation_in_parent=(-1.5708 0 0) location=(0 0 0)
    Body hip_top_one: mass=0.0009071847 mass_center=(0 0 0) inertia_xx=1 inertia_yy=1 inertia_zz=1 meshes=cylinder.vtp
      WeldJoint knee_stick_one_to_spine: parent_body=spine_stick location_in_parent=(0.036 -0.16 -0.036)
          orientation_in_parent=(0.5236 0 0.5236) location=(0 0 0)
    Body hip_top_two: mass=0.0009071847 mass_center=(0 0 0) inertia_xx=1 inertia_yy=1 inertia_zz=1 meshes=cylinder.vtp
      WeldJoint knee_stick_two_to_spine: parent_body=spine_stick location_in_parent=(0.036 -0.16 0.036)
          orientation_in_parent=(-0.5236 0 0.5236) location=(0 0 0)
    Body hip_top_three: mass=0.0009071847 mass_center=(0 0 0) inertia_xx=1 inertia_yy=1 inertia_zz=1
        meshes=cylinder.vtp
      WeldJoint knee_stick_two_to_spine: parent_body=spine_stick location_in_parent=(-0.036 -0.16 -0.036)
          orientation_in_parent=(0.5236 0 -0.5236) location=(0 0 0)
    Body hip_top_four: mass=0.0009071847 mass_center=(0 0 0) inertia_xx=1 inertia_yy=1 inertia_zz=1 meshes=cylinder.vtp
      WeldJoint knee_stick_one_to_spine: parent_body=spine_stick location_in_parent=(-0.036 -0.16 0.036)
          orientation_in_parent=(-0.5236 0 -0.5236) location=(0 0 0)
    Body hip_stick_y_massless: mass=0 mass_center=(0 0 0) inertia_xx=1 inertia_yy=1 inertia_zz=1 meshes=cylinder.vtp
      PinJoint hip: parent_body=spine_stick location_in_parent=(0 -0.24 0) orientation_in_parent=(0 -1.5708 0)
          location=(0 0 0)
        Coordinate Hip_Angle: motion_type=rotational default_value=0 range=(-0.8727 0.8727)
    Body hip_stick_y_one: mass=0.002267962 mass_center=(0 0 0) inertia_xx=1 inertia_yy=1 inertia_zz=1
        meshes=cylinder.vtp
      WeldJoint hip_one: parent_body=hip_stick_y_massless location_in_parent=(0 0.02 -0.04)
          orientation_in_parent=(-0.523599 0 0) location=(0 0 0)
    Body hip_stick_y_two: mass=0.002267962 mass_center=(0 0 0) inertia_xx=1 inertia_yy=1 inertia_zz=1
        meshes=cylinder.vtp
      WeldJoint hip_two: parent_body=hip_stick_y_massless location_in_parent=(0 0.02 0.04)
          orientation_in_parent=(0.523599 0 0) location=(0 0 0)
    Body femur_stick: mass=0.006577089 mass_center=(0 0 0) inertia_xx=1 inertia_yy=1 inertia_zz=1 meshes=cylinder.vtp
      WeldJoint femur_stick_to_hip_y: parent_body=hip_stick_y_massless location_in_parent=(0 -0.24 0)
          orientation_in_parent=(0 1.5708 0) location=(0 0 0)
    Body knee_stick_one: mass=0.002131884 mass_center=(0 0 0) inertia_xx=1 inertia_yy=1 inertia_zz=1
        meshes=cylinder.vtp
      WeldJoint knee_stick_one_to_femur: parent_body=femur_stick location_in_parent=(0 -0.3 0.05)
          orientation_in_parent=(-0.645772 0 0) location=(0 0 0)
    Body knee_stick_two: mass=0.002131884 mass_center=(0 0 0) inertia_xx=1 inertia_yy=1 inertia_zz=1
        meshes=cylinder.vtp
      WeldJoint knee_stick_two_to_femur: parent_body=femur_stick location_in_parent=(0.06 -0.3 -0.05)
          orientation_in_parent=(0.645772 0 0.785398) location=(0 0 0)
    Body knee_stick_three: mass=0.002131884 mass_center=(0 0 0) inertia_xx=1 inertia_yy=1 inertia_zz=1
        meshes=cylinder.vtp
      WeldJoint knee_stick_three_to_femur: parent_body=femur_stick location_in_parent=(-0.06 -0.3 -0.05)
          orientation_in_parent=(0.645772 0 -0.785398) location=(0 0 0)
    Body knee_stick_y_massless: mass=0 mass_center=(0 0 0) inertia_xx=1 inertia_yy=1 inertia_zz=1 meshes=cylinder.vtp
      PinJoint knee_one: parent_body=femur_stick location_in_parent=(0 -0.42 0) orientation_in_parent=(0 -1.5708 0)
          location=(0 0 0)
        Coordinate Knee_Angle: motion_type=rotational default_value=0 range=(-2.443461 0)
    Body knee_stick_y_one: mass=0.002267962 mass_center=(0 0 0) inertia_xx=1 inertia_yy=1 inertia_zz=1
        meshes=cylinder.vtp
      WeldJoint knee_one: parent_body=knee_stick_y_massless location_in_parent=(0 0.02 -0.04)
          orientation_in_parent=(-0.523599 0 0) location=(0 0 0)
    Body knee_stick_y_two: mass=0.002267962 mass_center=(0 0 0) inertia_xx=1 inertia_yy=1 inertia_zz=1
        meshes=cylinder.vtp
      WeldJoint knee_two: parent_body=knee_stick_y_massless location_in_parent=(0 0.02 0.04)
          orientation_in_parent=(0.523599 0 0) location=(0 0 0)
    Body tibia_stick: mass=0.007257478 mass_center=(0 0 0) inertia_xx=1 inertia_yy=1 inertia_zz=1 meshes=cylinder.vtp
      WeldJoint femur_stick_to_pelvis_stick: parent_body=knee_stick_y_massless location_in_parent=(0 -0.27 0)
          location=(0 0 0)
    Body foot_stick_one: mass=0.003175147 mass_center=(0 0 0) inertia_xx=1 inertia_yy=1 inertia_zz=1
        meshes=cylinder.vtp
      WeldJoint femur_stick_to_pelvis_stick: parent_body=tibia_stick location_in_parent=(0 -0.27 0)
          orientation_in_parent=(0 0 1.5708) location=(0 0 0)
    Body foot_stick_two: mass=0.003175147 mass_center=(0 0 0) inertia_xx=1 inertia_yy=1 inertia_zz=1
        meshes=cylinder.vtp
      WeldJoint femur_stick_to_pelvis_stick: parent_body=tibia_stick location_in_parent=(0 -0.27 0)
          orientation_in_parent=(1.5708 0 0) location=(0 0 0)
  ForceSet:
    CoordinateLimitForce Hip_Angle_Limit: coordinate=Hip_Angle upper_stiffness=20 [N*m/degree] upper_limit=50 [degrees]
        lower_stiffness=20 [N*m/degree] lower_limit=-50 [degrees] damping=0.1 transition=1 [degrees]
    CoordinateLimitForce Knee_Angle_Limit: coordinate=Knee_Angle upper_stiffness=20 upper_limit=0 lower_stiffness=20
        lower_limit=-100 damping=0.1 transition=1
    Thelen2003Muscle [values shared by the 32 below unless stated]: min_control=0 max_control=1 optimal_force=1
        max_isometric_force=0 optimal_fiber_length=0.1282385 tendon_slack_length=0.383539
        pennation_angle_at_optimal=0 [radians] max_contraction_velocity=10 activation_time_constant=0.01
        deactivation_time_constant=0.04 FmaxTendonStrain=0.033 FmaxMuscleStrain=0.6 KshapeActive=0.5 KshapePassive=4
        Af=0.3 Flen=1.8
    Thelen2003Muscle quad_cable_one:
      PathPoint P1: knee_stick_one (0 -0.07 0)
      PathPoint P2: hip_top_two (0 -0.05 0)
    Thelen2003Muscle quad_cable_two:
      PathPoint quad_cable_one-P1: knee_stick_one (0 -0.07 0)
      PathPoint quad_cable_one-P2: hip_top_four (0 -0.05 0)
    Thelen2003Muscle knee_y_one_to_knee_one:
      PathPoint low_knee-P1: knee_stick_one (0 -0.07 0)
      PathPoint low_knee-P2: knee_stick_y_one (0 0.07 0)
    Thelen2003Muscle knee_y_two_to_knee_one:
      PathPoint knee_cable_y_one_to_one-P1: knee_stick_one (0 -0.07 0)
      PathPoint knee_cable_y_one_to_one-P2: knee_stick_y_two (0 0.07 0)
    Thelen2003Muscle knee_y_one_to_knee_two:
      PathPoint knee_cable_y_two_to_one-P1: knee_stick_two (0 -0.07 0)
      PathPoint knee_cable_y_two_to_one-P2: knee_stick_y_one (0 0.07 0)
    Thelen2003Muscle knee_y_two_to_knee_three:
      PathPoint knee_cable_y_two_to_three-P1: knee_stick_three (0 -0.07 0)
      PathPoint knee_cable_y_two_to_three-P2: knee_stick_y_two (0 0.07 0)
    Thelen2003Muscle knee_y_two_to_femur:
      PathPoint knee_cable_y_two_to_three-P1: femur_stick (0 -0.25 0)
      PathPoint knee_cable_y_two_to_three-P2: knee_stick_y_two (0 0.07 0)
    Thelen2003Muscle knee_y_one_to_femur:
      PathPoint knee_cable_y_two_to_one-P1: femur_stick (0 -0.25 0)
      PathPoint knee_cable_y_two_to_one-P2: knee_stick_y_one (0 0.07 0)
    Thelen2003Muscle calf_cable_one:
      PathPoint P1: knee_stick_three (0 -0.07 0)
      PathPoint P2: foot_stick_one (0 0.09 0)
    Thelen2003Muscle calf_cable_two:
      PathPoint P1: knee_stick_two (0 -0.07 0)
      PathPoint P2: foot_stick_one (0 0.09 0)
    Thelen2003Muscle front_calf_cable:
      PathPoint P1: knee_stick_one (0 -0.07 0)
      PathPoint P2: foot_stick_one (0 -0.04 0)
    Thelen2003Muscle knee_two_to_tibia:
      PathPoint knee_cable_y_two_to_one-P1: knee_stick_two (0 -0.07 0)
      PathPoint knee_cable_y_two_to_one-P2: tibia_stick (0 0.23 0)
    Thelen2003Muscle knee_three_to_tibia:
      PathPoint knee_cable_y_two_to_one-P1: knee_stick_three (0 -0.07 0)
      PathPoint knee_cable_y_two_to_one-P2: tibia_stick (0 0.23 0)
    Thelen2003Muscle hamstring_cable_one:
      PathPoint P1: knee_stick_two (0 -0.07 0)
      PathPoint P2: hip_top_one (0 -0.05 0)
    Thelen2003Muscle hamstring_cable_two:
      PathPoint P1: knee_stick_three (0 -0.07 0)
      PathPoint P2: hip_top_three (0 -0.05 0)
    Thelen2003Muscle hamstring: max_isometric_force=0.075
      PathPoint P1: hamstring_stick (0 0 0)
      PathPoint P2: tibia_stick (0 0.21 0)
    Thelen2003Muscle psoas: max_isometric_force=75
      PathPoint P1: steel_beam (0 0.4 0)
      PathPoint P2: femur_stick (0 0.1 0)
    Thelen2003Muscle psoas_cable_one:
      PathPoint P1: hip_top_two (0 -0.07 0)
      PathPoint P2: quad_stick (0.0102242 -0.07 0)
    Thelen2003Muscle psoas_cable_two:
      PathPoint P1: hip_top_four (0 -0.07 0)
      PathPoint P2: quad_stick (0.0102242 0.07 0)
    Thelen2003Muscle semimembranosus: max_isometric_force=75
      PathPoint psoas-P1: steel_beam (0 -0.4 0)
      PathPoint psoas-P2: femur_stick (0 0.1 0)
    Thelen2003Muscle semimembranosus_cable_one:
      PathPoint P1: hip_top_one (0 -0.07 0)
      PathPoint P2: hamstring_stick (0.0102242 -0.07 0)
    Thelen2003Muscle semimembranosus_cable_two:
      PathPoint P1: hip_top_three (0 -0.07 0)
      PathPoint P2: hamstring_stick (0.0102242 0.07 0)
    Thelen2003Muscle hip_top_three_to_femur:
      PathPoint semimembranosus_cable_two-P1: hip_top_three (0 -0.07 0)
      PathPoint semimembranosus_cable_two-P2: femur_stick (0 0.24 0)
    Thelen2003Muscle hip_top_four_to_femur:
      PathPoint semimembranosus_cable_two-P1: hip_top_four (0 -0.07 0)
      PathPoint semimembranosus_cable_two-P2: femur_stick (0 0.24 0)
    Thelen2003Muscle hip_top_two_to_femur:
      PathPoint semimembranosus_cable_two-P1: hip_top_two (0 -0.07 0)
      PathPoint semimembranosus_cable_two-P2: femur_stick (0 0.24 0)
    Thelen2003Muscle hip_top_one_to_femur:
      PathPoint semimembranosus_cable_two-P1: hip_top_one (0 -0.07 0)
      PathPoint semimembranosus_cable_two-P2: femur_stick (0 0.24 0)
    Thelen2003Muscle hip_top_two_to_hip_stick_y_one:
      PathPoint quad_cable_one-P1: hip_stick_y_one (0 0.04 0)
      PathPoint quad_cable_one-P2: hip_top_two (0 -0.05 0)
    Thelen2003Muscle hip_top_one_to_hip_stick_y_one:
      PathPoint quad_cable_one-P1: hip_stick_y_one (0 0.04 0)
      PathPoint quad_cable_one-P2: hip_top_one (0 -0.05 0)
    Thelen2003Muscle hip_top_three_to_hip_stick_y_two:
      PathPoint quad_cable_one-P1: hip_stick_y_two (0 0.04 0)
      PathPoint quad_cable_one-P2: hip_top_three (0 -0.05 0)
    Thelen2003Muscle hip_top_four_to_hip_stick_y_two:
      PathPoint quad_cable_one-P1: hip_stick_y_two (0 0.04 0)
      PathPoint quad_cable_one-P2: hip_top_four (0 -0.05 0)
    Thelen2003Muscle spine_stick_to_hip_stick_y_one:
      PathPoint quad_cable_one-P1: hip_stick_y_one (0 0.04 0)
      PathPoint quad_cable_one-P2: spine_stick (0 -0.1 0)
    Thelen2003Muscle spine_stick_to_hip_stick_y_two:
      PathPoint quad_cable_one-P1: hip_stick_y_two (0 0.04 0)
      PathPoint quad_cable_one-P2: spine_stick (0 -0.1 0)
