# OpenSim document version 30000
Model Tensegrity_Knee:
  length_units: meters
  force_units: N
  gravity: 0 -9.80665 0
  BodySet:
    Body ground: mass=0 mass_center=(0 0 0) inertia_xx=0 inertia_yy=0 inertia_zz=0
    Body pelvis_stick: mass=1 mass_center=(0 0 0) inertia_xx=1 inertia_yy=1 inertia_zz=1 meshes=cylinder.vtp
      WeldJoint pelvis_stick_to_ground: parent_body=ground location_in_parent=(0 2 0)
          orientation_in_parent=(1.5708 0 0) location=(0 0 0)
    Body femur_stick: mass=1 mass_center=(0 0 0) inertia_xx=1 inertia_yy=1 inertia_zz=1 meshes=cylinder.vtp
      WeldJoint femur_stick_to_pelvis_stick: parent_body=pelvis_stick location_in_parent=(0 0 0.25)
          orientation_in_parent=(-1.5708 0 0) location=(0 0 0)
    Body knee_stick_one: mass=1 mass_center=(0 0 0) inertia_xx=1 inertia_yy=1 inertia_zz=1 meshes=cylinder.vtp
      WeldJoint knee_stick_one_to_femur: parent_body=femur_stick location_in_parent=(0 -0.33 0.05)
          orientation_in_parent=(-0.645772 0 0) location=(0 0 0)
    Body knee_stick_two: mass=1 mass_center=(0 0 0) inertia_xx=1 inertia_yy=1 inertia_zz=1 meshes=cylinder.vtp
      WeldJoint knee_stick_two_to_femur: parent_body=femur_stick location_in_parent=(0.06 -0.32 -0.05)
          orientation_in_parent=(0.645772 0 0.785398) location=(0 0 0)
    Body knee_stick_three: mass=1 mass_center=(0 0 0) inertia_xx=1 inertia_yy=1 inertia_zz=1 meshes=cylinder.vtp
      WeldJoint knee_stick_three_to_femur: parent_body=femur_stick location_in_parent=(-0.06 -0.32 -0.05)
          orientation_in_parent=(0.645772 0 -0.785398) location=(0 0 0)
    Body quad_stick: mass=1 mass_center=(0 0 0) inertia_xx=1 inertia_yy=1 inertia_zz=1 meshes=cylinder.vtp
      WeldJoint knee_stick_three_to_femur: parent_body=pelvis_stick location_in_parent=(0 0.25 0)
          orientation_in_parent=(1.5708 0 1.5708) location=(0 0 0)
    Body hamstring_stick: mass=1 mass_center=(0 0 0) inertia_xx=1 inertia_yy=1 inertia_zz=1 meshes=cylinder.vtp
      WeldJoint knee_stick_three_to_femur: parent_body=pelvis_stick location_in_parent=(0 -0.25 0)
          orientation_in_parent=(1.5708 0 1.5708) location=(0 0 0)
    Body knee_stick_y_massless: mass=0 mass_center=(0 0 0) inertia_xx=1 inertia_yy=1 inertia_zz=1 meshes=cylinder.vtp
      PinJoint knee_one: parent_body=femur_stick location_in_parent=(0 -0.42 0) orientation_in_parent=(0 -1.5708 0)
          location=(0 0 0)
        Coordinate Knee_Angle: motion_type=rotational default_value=0 range=(-2.443461 0)
    Body knee_stick_y_one: mass=1 mass_center=(0 0 0) inertia_xx=1 inertia_yy=1 inertia_zz=1 meshes=cylinder.vtp
      WeldJoint knee_one: parent_body=knee_stick_y_massless location_in_parent=(0 0.02 -0.04)
          orientation_in_parent=(-0.523599 0 0) location=(0 0 0)
    Body knee_stick_y_two: mass=1 mass_center=(0 0 0) inertia_xx=1 inertia_yy=1 inertia_zz=1 meshes=cylinder.vtp
      WeldJoint knee_two: parent_body=knee_stick_y_massless location_in_parent=(0 0.02 0.04)
          orientation_in_parent=(0.523599 0 0) location=(0 0 0)
    Body tibia_stick: mass=0.0000000005 mass_center=(0 0 0) inertia_xx=1 inertia_yy=1 inertia_zz=1 meshes=cylinder.vtp
      WeldJoint femur_stick_to_pelvis_stick: parent_body=knee_stick_y_massless location_in_parent=(0 -0.27 0)
          location=(0 0 0)
    Body foot_stick_one: mass=1 mass_center=(0 0 0) inertia_xx=1 inertia_yy=1 inertia_zz=1 meshes=cylinder.vtp
      WeldJoint femur_stick_to_pelvis_stick: parent_body=tibia_stick location_in_parent=(0 -0.27 0)
          orientation_in_parent=(0 0 1.5708) location=(0 0 0)
  ConstraintSet knee_constraint:
    WeldConstraint: isDisabled=true body_1=knee_stick_y_one body_2=knee_stick_y_two location_body_1=(0 0 0)
        orientation_body_1=(0 0 0) location_body_2=(0 0 0) orientation_body_2=(0 0 0)
  ForceSet:
    Thelen2003Muscle [values shared by the 16 below unless stated]: min_control=0.01 max_control=1 optimal_force=1
        max_isometric_force=2594 optimal_fiber_length=0.1282385 tendon_slack_length=0.383539
        pennation_angle_at_optimal=0 [radians] max_contraction_velocity=10 activation_time_constant=0.01
        deactivation_time_constant=0.04 FmaxTendonStrain=0.033 FmaxMuscleStrain=0.6 KshapeActive=0.5 KshapePassive=4
        Af=0.3 Flen=1.8
    Thelen2003Muscle quad_cable_one:
      PathPoint P1: knee_stick_one (0 -0.07 0)
      PathPoint P2: quad_stick (0.0102242 -0.07 0)
    Thelen2003Muscle quad_cable_two:
      PathPoint quad_cable_one-P1: knee_stick_one (0 -0.07 0)
      PathPoint quad_cable_one-P2: quad_stick (0.0102242 0.07 0)
    Thelen2003Muscle knee_y_one_to_knee_one:
      PathPoint low_knee-P1: knee_stick_one (0 -0.07 0)
      PathPoint low_knee-P2: knee_stick_y_one (0 0.07 0)
    Thelen2003Muscle knee_y_two_to_knee_one:
      PathPoint knee_cable_y_one_to_one-P1: knee_stick_one (0 -0.07 0)
      PathPoint knee_cable_y_one_to_one-P2: knee_stick_y_two (0 0.07 0)
    Thelen2003Muscle knee_y_one_to_knee_two:
      PathPoint knee_cable_y_two_to_one-P1: knee_stick_two (0 -0.07 0)
      PathPoint knee_cable_y_two_to_one-P2: knee_stick_y_one (0 0.07 0)
    Thelen2003Muscle knee_y_two_to_knee_three:
      PathPoint knee_cable_y_two_to_three-P1: knee_stick_three (0 -0.07 0)
      PathPoint knee_cable_y_two_to_three-P2: knee_stick_y_two (0 0.07 0)
    Thelen2003Muscle knee_y_two_to_femur:
      PathPoint knee_cable_y_two_to_three-P1: femur_stick (0 -0.25 0)
      PathPoint knee_cable_y_two_to_three-P2: knee_stick_y_two (0 0.07 0)
    Thelen2003Muscle knee_y_one_to_femur:
      PathPoint knee_cable_y_two_to_one-P1: femur_stick (0 -0.25 0)
      PathPoint knee_cable_y_two_to_one-P2: knee_stick_y_one (0 0.07 0)
    Thelen2003Muscle hamstring_cable_one:
      PathPoint P1: knee_stick_two (0 -0.07 0)
      PathPoint P2: hamstring_stick (0.0102242 -0.07 0)
    Thelen2003Muscle hamstring_cable_two:
      PathPoint P1: knee_stick_three (0 -0.07 0)
      PathPoint P2: hamstring_stick (0.0102242 0.07 0)
    Thelen2003Muscle calf_cable_one:
      PathPoint P1: knee_stick_three (0 -0.07 0)
      PathPoint P2: foot_stick_one (0 0.09 0)
    Thelen2003Muscle calf_cable_two:
      PathPoint P1: knee_stick_two (0 -0.07 0)
      PathPoint P2: foot_stick_one (0 0.09 0)
    Thelen2003Muscle front_calf_cable:
      PathPoint P1: knee_stick_one (0 -0.07 0)
      PathPoint P2: foot_stick_one (0 -0.04 0)
    Thelen2003Muscle knee_two_to_tibia:
      PathPoint knee_cable_y_two_to_one-P1: knee_stick_two (0 -0.07 0)
      PathPoint knee_cable_y_two_to_one-P2: tibia_stick (0 0.23 0)
    Thelen2003Muscle knee_three_to_tibia:
      PathPoint knee_cable_y_two_to_one-P1: knee_stick_three (0 -0.07 0)
      PathPoint knee_cable_y_two_to_one-P2: tibia_stick (0 0.23 0)
    Thelen2003Muscle hamstring: max_isometric_force=0.75
      PathPoint P1: hamstring_stick (0 0 0)
      PathPoint P2: tibia_stick (0 0.21 0)
