# OpenSim document version 30000
# <xs:element name="scale_factor" type="xs:decimal"/>
# <scale_factor>1</scale_factor>
Model Tensegrity_Knee_Rev_tibia_spur:
  length_units: meters
  force_units: N
  gravity: 0 -9.80665 0
  scale_variable: 0.25
  credits:
    Erik Jung, Lawrence Ngo, Nicholas Cessna, Chris Cheney, Adam Buderi.
  element scale_variable: type=xs:decimal
  BodySet:
    Body ground: mass=0 mass_center=(0 0 0) inertia_xx=0 inertia_yy=0 inertia_zz=0 meshes=cube.vtp
    Body steel_beam: mass=0 mass_center=(0 0 0) inertia_xx=1 inertia_yy=1 inertia_zz=1 meshes=cylinder.vtp
      WeldJoint steel_beam_to_ground: parent_body=ground location_in_parent=(0 2 0) orientation_in_parent=(1.5708 0 0)
          location=(0 0 0)
    Body quad_stick: mass=0.002131884 mass_center=(0 0 0) inertia_xx=1 inertia_yy=1 inertia_zz=1 meshes=cylinder.vtp
      WeldJoint quad_stick_to_beam: parent_body=steel_beam location_in_parent=(0 0.25 0)
          orientation_in_parent=(1.5708 0 1.5708) location=(0 0 0)
    Body hamstring_stick: mass=0.002131884 mass_center=(0 0 0) inertia_xx=1 inertia_yy=1 inertia_zz=1
        meshes=cylinder.vtp
      WeldJoint hamstring_stick_to_beam: parent_body=steel_beam location_in_parent=(0 -0.25 0)
          orientation_in_parent=(1.5708 0 1.5708) location=(0 0 0)
    Body spine_stick: mass=0.003719457 mass_center=(0 0 0) inertia_xx=1 inertia_yy=1 inertia_zz=1 meshes=cylinder.vtp
      WeldJoint spine_stick_to_ground: parent_body=steel_beam location_in_parent=(0 0 0.15)
          orientation_in_parent=(-1.5708 0 0) location=(0 0 0)
    Body hip_top_one: mass=0.0009071847 mass_center=(0 0 0) inertia_xx=1 inertia_yy=1 inertia_zz=1 meshes=cylinder.vtp
      WeldJoint knee_stick_one_to_spine: parent_body=spine_stick location_in_parent=(0.036 -0.16 -0.036)
          orientation_in_parent=(0.5236 0 0.5236) location=(0 0 0)
    Body hip_top_two: mass=0.0009071847 mass_center=(0 0 0) inertia_xx=1 inertia_yy=1 inertia_zz=1 meshes=cylinder.vtp
      WeldJoint knee_stick_two_to_spine: parent_body=spine_stick location_in_parent=(0.036 -0.16 0.036)
          orientation_in_parent=(-0.5236 0 0.5236) location=(0 0 0)
    Body hip_top_three: mass=0.0009071847 mass_center=(0 0 0) inertia_xx=1 inertia_yy=1 inertia_zz=1
        meshes=cylinder.vtp
      WeldJoint knee_stick_two_to_spine: parent_body=spine_stick location_in_parent=(-0.036 -0.16 -0.036)
          orientation_in_parent=(0.5236 0 -0.5236) location=(0 0 0)
    Body hip_top_four: mass=0.0009071847 mass_center=(0 0 0) inertia_xx=1 inertia_yy=1 inertia_zz=1 meshes=cylinder.vtp
      WeldJoint knee_stick_one_to_spine: parent_body=spine_stick location_in_parent=(-0.036 -0.16 0.036)
          orientation_in_parent=(-0.5236 0 -0.5236) location=(0 0 0)
    Body hip_stick_y_massless: mass=0 mass_center=(0 0 0) inertia_xx=1 inertia_yy=1 inertia_zz=1 meshes=cylinder.vtp
      PinJoint hip: parent_body=spine_stick location_in_parent=(0 -0.24 0) orientation_in_parent=(0 -1.5708 0)
          location=(0 0 0)
        Coordinate Hip_Angle: motion_type=rotational default_value=0 range=(-0.8727 0.8727)
    Body hip_stick_y_one: mass=0.002267962 mass_center=(0 0 0) inertia_xx=1 inertia_yy=1 inertia_zz=1
        meshes=cylinder.vtp
      WeldJoint hip_one: parent_body=hip_stick_y_massless location_in_parent=(0 0.02 -0.04)
          orientation_in_parent=(-0.523599 0 0) location=(0 0 0)
    Body hip_stick_y_two: mass=0.002267962 mass_center=(0 0 0) inertia_xx=1 inertia_yy=1 inertia_zz=1
        meshes=cylinder.vtp
      WeldJoint hip_two: parent_body=hip_stick_y_massless location_in_parent=(0 0.02 0.04)
          orientation_in_parent=(0.523599 0 0) location=(0 0 0)
    Body femur_stick: mass=0.006577089 mass_center=(0 0 0) inertia_xx=1 inertia_yy=1 inertia_zz=1 meshes=cylinder.vtp
      WeldJoint femur_stick_to_hip_y: parent_body=hip_stick_y_massless location_in_parent=(0 -0.24 0)
          orientation_in_parent=(0 1.5708 0) location=(0 0 0)
    Body knee_stick_one: mass=0.002131884 mass_center=(0 0 0) inertia_xx=1 inertia_yy=1 inertia_zz=1
        meshes=cylinder.vtp
      WeldJoint knee_stick_one_to_femur: parent_body=femur_stick location_in_parent=(0 -0.3 0.04)
          orientation_in_parent=(-0.645772 0 0) location=(0 0 0)
    Body knee_stick_two: mass=0.002131884 mass_center=(0 0 0) inertia_xx=1 inertia_yy=1 inertia_zz=1
        meshes=cylinder.vtp
      WeldJoint knee_stick_two_to_femur: parent_body=femur_stick location_in_parent=(0.06 -0.3 -0.05)
          orientation_in_parent=(0.645772 0 0.785398) location=(0 0 0)
    Body knee_stick_three: mass=0.002131884 mass_center=(0 0 0) inertia_xx=1 inertia_yy=1 inertia_zz=1
        meshes=cylinder.vtp
      WeldJoint knee_stick_three_to_femur: parent_body=femur_stick location_in_parent=(-0.06 -0.3 -0.05)
          orientation_in_parent=(0.645772 0 -0.785398) location=(0 0 0)
    Body knee_stick_y_massless: mass=0 mass_center=(0 0 0) inertia_xx=1 inertia_yy=1 inertia_zz=1 meshes=cylinder.vtp
      PinJoint knee_one: parent_body=femur_stick location_in_parent=(0 -0.42 0) orientation_in_parent=(0 -1.5708 0)
          location=(0 0 0)
        Coordinate Knee_Angle: motion_type=rotational default_value=0 range=(-2.443461 0)
    Body knee_stick_y_one: mass=0.002267962 mass_center=(0 0 0) inertia_xx=1 inertia_yy=1 inertia_zz=1
        meshes=cylinder.vtp
      WeldJoint knee_one: parent_body=knee_stick_y_massless location_in_parent=(0 0.02 -0.04)
          orientation_in_parent=(-0.523599 0 0) location=(0 0 0)
    Body knee_stick_y_two: mass=0.002267962 mass_center=(0 0 0) inertia_xx=1 inertia_yy=1 inertia_zz=1
        meshes=cylinder.vtp
      WeldJoint knee_two: parent_body=knee_stick_y_massless location_in_parent=(0 0.02 0.04)
          orientation_in_parent=(0.523599 0 0) location=(0 0 0)
    Body tibia_stick: mass=0.007257478 mass_center=(0 0 0) inertia_xx=1 inertia_yy=1 inertia_zz=1 meshes=cylinder.vtp
      WeldJoint femur_stick_to_pelvis_stick: parent_body=knee_stick_y_massless location_in_parent=(0 -0.27 0)
          location=(0 0 0)
    Body ankle_stick_y_massless: mass=0 mass_center=(0 0 0) inertia_xx=1 inertia_yy=1 inertia_zz=1 meshes=cylinder.vtp
      PinJoint ankle_one: parent_body=foot_stick_one location_in_parent=(-0.04 0 0) orientation_in_parent=(0 0 -1.5708)
          location=(0 0 0)
        Coordinate Knee_Angle: motion_type=rotational default_value=0 range=(-2.443461 0)
    Body knee_stick_two: mass=0.002131884 mass_center=(0 0 0) inertia_xx=1 inertia_yy=1 inertia_zz=1
        meshes=cylinder.vtp
      WeldJoint knee_stick_two_to_femur: parent_body=femur_stick location_in_parent=(0.06 -0.3 -0.05)
          orientation_in_parent=(0.645772 0 0.785398) location=(0 0 0)
    Body foot_stick_one: mass=0.003175147 mass_center=(0 0 0) inertia_xx=1 inertia_yy=1 inertia_zz=1
        meshes=cylinder.vtp
      WeldJoint foot_stick_to_tibia_stick: parent_body=tibia_stick location_in_parent=(0 -0.27 0)
          orientation_in_parent=(0 0 1.5708) location=(0 0 0)
    Body foot_stick_two: mass=0.002267962 mass_center=(0 0 0) inertia_xx=1 inertia_yy=1 inertia_zz=1
        meshes=cylinder.vtp
      WeldJoint foot_two: parent_body=tibia_stick location_in_parent=(0 -0.32 -0.04)
          orientation_in_parent=(0.523599 0 0) location=(0 0 0)
    Body foot_stick_three: mass=0.002267962 mass_center=(0 0 0) inertia_xx=1 inertia_yy=1 inertia_zz=1
        meshes=cylinder.vtp
      WeldJoint foot_three: parent_body=tibia_stick location_in_parent=(0 -0.32 0.04)
          orientation_in_parent=(-0.523599 0 0) location=(0 0 0)
    Body steel_beam_ground: mass=0 mass_center=(0 0 0) inertia_xx=1 inertia_yy=1 inertia_zz=1 meshes=cylinder.vtp
      WeldJoint steel_beam_at_ground: parent_body=ground location_in_parent=(0 0 0) orientation_in_parent=(1.5708 0 0)
          location=(0 0 0)
    Body spine_stick_ground: mass=0.003719457 mass_center=(0 0 0) inertia_xx=1 inertia_yy=1 inertia_zz=1
        meshes=cylinder.vtp
      WeldJoint spine_stick_at_ground: parent_body=steel_beam_ground location_in_parent=(0 0 -0.15)
          orientation_in_parent=(-1.5708 0 0) location=(0 0 0)
    Body ankle_bottom_one: mass=0.0009071847 mass_center=(0 0 0) inertia_xx=1 inertia_yy=1 inertia_zz=1
        meshes=cylinder.vtp
      WeldJoint ankle_stick_one_to_spine: parent_body=spine_stick_ground location_in_parent=(0.036 0.16 -0.036)
          orientation_in_parent=(-0.5236 0 -0.5236) location=(0 0 0)
    Body ankle_bottom_two: mass=0.0009071847 mass_center=(0 0 0) inertia_xx=1 inertia_yy=1 inertia_zz=1
        meshes=cylinder.vtp
      WeldJoint ankle_bottom_two_to_foot: parent_body=spine_stick_ground location_in_parent=(0.036 0.16 0.036)
          orientation_in_parent=(0.5236 0 -0.5236) location=(0 0 0)
    Body ankle_bottom_three: mass=0.0009071847 mass_center=(0 0 0) inertia_xx=1 inertia_yy=1 inertia_zz=1
        meshes=cylinder.vtp
      WeldJoint ankle_bottom_three_to_spine_ground: parent_body=spine_stick_ground
          location_in_parent=(-0.036 0.16 -0.036) orientation_in_parent=(-0.5236 0 0.5236) location=(0 0 0)
    Body ankle_bottom_four: mass=0.0009071847 mass_center=(0 0 0) inertia_xx=1 inertia_yy=1 inertia_zz=1
        meshes=cylinder.vtp
      WeldJoint ankle_stick_four_to_spine_ground: parent_body=spine_stick_ground location_in_parent=(-0.036 0.16 0.036)
          orientation_in_parent=(0.5236 0 0.5236) location=(0 0 0)
    Body quad_stick_ground: mass=0.002131884 mass_center=(0 0 0) inertia_xx=1 inertia_yy=1 inertia_zz=1
        meshes=cylinder.vtp
      WeldJoint quad_stick_to_beam_ground: parent_body=steel_beam_ground location_in_parent=(0 0.25 0)
          orientation_in_parent=(1.5708 0 1.5708) location=(0 0 0)
    Body hamstring_stick_ground: mass=0.002131884 mass_center=(0 0 0) inertia_xx=1 inertia_yy=1 inertia_zz=1
        meshes=cylinder.vtp
      WeldJoint hamstring_stick_to_beam_ground: parent_body=steel_beam_ground location_in_parent=(0 -0.25 0)
          orientation_in_parent=(1.5708 0 1.5708) location=(0 0 0)
    Body middle_stick_ground: mass=0.002131884 mass_center=(0 0 0) inertia_xx=1 inertia_yy=1 inertia_zz=1
        meshes=cylinder.vtp
      WeldJoint hamstring_stick_to_beam_ground: parent_body=steel_beam_ground location_in_parent=(0 0 0)
          orientation_in_parent=(1.5708 0 1.5708) location=(0 0 0)
  ForceSet:
    CoordinateLimitForce Hip_Angle_Limit: coordinate=Hip_Angle upper_stiffness=20 [N*m/degree] upper_limit=50 [degrees]
        lower_stiffness=20 [N*m/degree] lower_limit=-50 [degrees] damping=0.1 transition=1 [degrees]
    CoordinateLimitForce Knee_Angle_Limit: coordinate=Knee_Angle upper_stiffness=20 upper_limit=0 lower_stiffness=20
        lower_limit=-100 damping=0.1 transition=1
    Thelen2003Muscle [values shared by the 51 below unless stated]: min_control=0.02 max_control=1 optimal_force=1
        max_isometric_force=0 optimal_fiber_length=0.1282385 tendon_slack_length=0.383539
        pennation_angle_at_optimal=0 [radians] max_contraction_velocity=10 activation_time_constant=0.01
        deactivation_time_constant=0.04 FmaxTendonStrain=0.033 FmaxMuscleStrain=0.6 KshapeActive=0.5 KshapePassive=4
        Af=0.3 Flen=1.8
    Thelen2003Muscle quad_cable_one: isDisabled=true
      PathPoint P1: knee_stick_one (0 -0.07 0)
      PathPoint P2: hip_top_two (0 -0.05 0)
    Thelen2003Muscle quad_cable_two: isDisabled=true
      PathPoint quad_cable_one-P1: knee_stick_one (0 -0.07 0)
      PathPoint quad_cable_one-P2: hip_top_four (0 -0.05 0)
    Thelen2003Muscle knee_y_one_to_knee_one: isDisabled=true
      PathPoint low_knee-P1: knee_stick_one (0 -0.07 0)
      PathPoint low_knee-P2: knee_stick_y_one (0 0.07 0)
    Thelen2003Muscle knee_y_two_to_knee_one: isDisabled=true
      PathPoint knee_cable_y_one_to_one-P1: knee_stick_one (0 -0.07 0)
      PathPoint knee_cable_y_one_to_one-P2: knee_stick_y_two (0 0.07 0)
    Thelen2003Muscle knee_y_one_to_knee_two: isDisabled=true
      PathPoint knee_cable_y_two_to_one-P1: knee_stick_two (0 -0.07 0)
      PathPoint knee_cable_y_two_to_one-P2: knee_stick_y_one (0 0.07 0)
    Thelen2003Muscle knee_y_two_to_knee_three: isDisabled=true
      PathPoint knee_cable_y_two_to_three-P1: knee_stick_three (0 -0.07 0)
      PathPoint knee_cable_y_two_to_three-P2: knee_stick_y_two (0 0.07 0)
    Thelen2003Muscle knee_y_two_to_femur: isDisabled=true
      PathPoint knee_cable_y_two_to_three-P1: femur_stick (0 -0.25 0)
      PathPoint knee_cable_y_two_to_three-P2: knee_stick_y_two (0 0.07 0)
    Thelen2003Muscle knee_y_one_to_femur: isDisabled=true
      PathPoint knee_cable_y_two_to_one-P1: femur_stick (0 -0.25 0)
      PathPoint knee_cable_y_two_to_one-P2: knee_stick_y_one (0 0.07 0)
    Thelen2003Muscle calf_cable_one: isDisabled=true
      PathPoint P1: knee_stick_three (0 -0.07 0)
      PathPoint P2: foot_stick_one (0 0.09 0)
    Thelen2003Muscle calf_cable_two: isDisabled=true
      PathPoint P1: knee_stick_two (0 -0.07 0)
      PathPoint P2: foot_stick_one (0 0.09 0)
    Thelen2003Muscle front_calf_cable: isDisabled=true
      PathPoint P1: knee_stick_one (0 -0.07 0)
      PathPoint P2: foot_stick_one (0 -0.04 0)
    Thelen2003Muscle knee_foot_muscle:
      PathPoint P1: knee_stick_one (0 -0.07 0)
      PathPoint P2: steel_beam_ground (0 0.2 0)
    Thelen2003Muscle inner_knee: max_isometric_force=1
      PathPoint P1: knee_stick_one (0 -0.07 0)
      PathPoint P2: tibia_stick (0 0.21 0)
    Thelen2003Muscle inner_knee: max_isometric_force=1
      PathPoint P1: tibia_stick (0 0.21 0)
      PathPoint P2: hip_top_one (0 -0.07 0)
    Thelen2003Muscle calf_muscle-1:
      PathPoint P1: knee_stick_two (0 -0.07 0)
      PathPoint P2: steel_beam_ground (0 -0.2 0)
    Thelen2003Muscle calf_muscle-2:
      PathPoint P1: knee_stick_three (0 -0.07 0)
      PathPoint P2: steel_beam_ground (0 -0.2 0)
    Thelen2003Muscle knee_three_to_hip_four:
      PathPoint P1: knee_stick_three (0 -0.07 0)
      PathPoint P2: hip_top_four (0 -0.07 0)
    Thelen2003Muscle knee_two_to_hip_two:
      PathPoint P1: knee_stick_two (0 -0.07 0)
      PathPoint P2: hip_top_two (0 -0.07 0)
    Thelen2003Muscle inner_knee: max_isometric_force=1
      PathPoint P1: tibia_stick (0 0.21 0)
      PathPoint P2: hip_top_three (0 -0.07 0)
    Thelen2003Muscle knee_two_to_tibia: isDisabled=true
      PathPoint knee_cable_y_two_to_one-P1: knee_stick_two (0 -0.07 0)
      PathPoint knee_cable_y_two_to_one-P2: tibia_stick (0 0.23 0)
    Thelen2003Muscle knee_three_to_tibia: isDisabled=true
      PathPoint knee_cable_y_two_to_one-P1: knee_stick_three (0 -0.07 0)
      PathPoint knee_cable_y_two_to_one-P2: tibia_stick (0 0.23 0)
    Thelen2003Muscle hamstring_cable_one: isDisabled=true
      PathPoint P1: knee_stick_two (0 -0.07 0)
      PathPoint P2: hip_top_one (0 -0.05 0)
    Thelen2003Muscle hamstring_cable_two: isDisabled=true
      PathPoint P1: knee_stick_three (0 -0.07 0)
      PathPoint P2: hip_top_three (0 -0.05 0)
    Thelen2003Muscle hamstring: max_isometric_force=1
      PathPoint P1: hamstring_stick (0 0 0)
      PathPoint P2: tibia_stick (0 0.21 0)
    Thelen2003Muscle psoas_cable_one: isDisabled=true
      PathPoint P1: hip_top_two (0 -0.07 0)
      PathPoint P2: quad_stick (0.0102242 -0.07 0)
    Thelen2003Muscle psoas_cable_two: isDisabled=true
      PathPoint P1: hip_top_four (0 -0.07 0)
      PathPoint P2: quad_stick (0.0102242 0.07 0)
    Thelen2003Muscle semimembranosus_cable_one: isDisabled=true
      PathPoint P1: hip_top_one (0 -0.07 0)
      PathPoint P2: hamstring_stick (0.0102242 -0.07 0)
    Thelen2003Muscle semimembranosus_cable_two: isDisabled=true
      PathPoint P1: hip_top_three (0 -0.07 0)
      PathPoint P2: hamstring_stick (0.0102242 0.07 0)
    Thelen2003Muscle hip_top_three_to_femur: isDisabled=true
      PathPoint semimembranosus_cable_two-P1: hip_top_three (0 -0.07 0)
      PathPoint semimembranosus_cable_two-P2: femur_stick (0 0.24 0)
    Thelen2003Muscle hip_top_four_to_femur: isDisabled=true
      PathPoint semimembranosus_cable_two-P1: hip_top_four (0 -0.07 0)
      PathPoint semimembranosus_cable_two-P2: femur_stick (0 0.24 0)
    Thelen2003Muscle hip_top_two_to_femur: isDisabled=true
      PathPoint semimembranosus_cable_two-P1: hip_top_two (0 -0.07 0)
      PathPoint semimembranosus_cable_two-P2: femur_stick (0 0.24 0)
    Thelen2003Muscle hip_top_one_to_femur: isDisabled=true
      PathPoint semimembranosus_cable_two-P1: hip_top_one (0 -0.07 0)
      PathPoint semimembranosus_cable_two-P2: femur_stick (0 0.24 0)
    Thelen2003Muscle hip_top_two_to_hip_stick_y_one: isDisabled=true
      PathPoint quad_cable_one-P1: hip_stick_y_one (0 0.04 0)
      PathPoint quad_cable_one-P2: hip_top_two (0 -0.05 0)
    Thelen2003Muscle hip_top_one_to_hip_stick_y_one: isDisabled=true
      PathPoint quad_cable_one-P1: hip_stick_y_one (0 0.04 0)
      PathPoint quad_cable_one-P2: hip_top_one (0 -0.05 0)
    Thelen2003Muscle hip_top_three_to_hip_stick_y_two: isDisabled=true
      PathPoint quad_cable_one-P1: hip_stick_y_two (0 0.04 0)
      PathPoint quad_cable_one-P2: hip_top_three (0 -0.05 0)
    Thelen2003Muscle hip_top_four_to_hip_stick_y_two: isDisabled=true
      PathPoint hip_top_four_cable_to_hip_stick_y_two-P1: hip_stick_y_two (0 0.04 0)
      PathPoint hip_top_four_cable_to_hip_stick_y_two-P2: hip_top_four (0 -0.05 0)
    Thelen2003Muscle spine_stick_to_hip_stick_y_one: isDisabled=true
      PathPoint spine_stick_cable_to_hip_stick_y_one-P1: hip_stick_y_one (0 0.04 0)
      PathPoint spine_stick_cable_to_hip_stick_y_one-P2: spine_stick (0 -0.1 0)
    Thelen2003Muscle spine_stick_to_hip_stick_y_two: isDisabled=true
      PathPoint spine_stick_cable_to_hip_stick_y_two-P1: hip_stick_y_two (0 0.04 0)
      PathPoint spine_stick_cable_to_hip_stick_y_two-P2: spine_stick (0 -0.1 0)
    Thelen2003Muscle calf_cable_one_ground: isDisabled=true
      PathPoint P1: ankle_bottom_two (0 0.07 0)
      PathPoint P2: quad_stick_ground (0.0102242 -0.07 0)
    Thelen2003Muscle calf_cable_two_ground: isDisabled=true
      PathPoint P1: ankle_bottom_four (0 -0.07 0)
      PathPoint P2: quad_stick_ground (0.0102242 0.07 0)
    Thelen2003Muscle calf_cable_three_ground: isDisabled=true
      PathPoint P1: ankle_bottom_one (0 -0.07 0)
      PathPoint P2: hamstring_stick_ground (0.0102242 -0.07 0)
    Thelen2003Muscle calf_top_four_to_spine_stick_ground_y_two: isDisabled=true
      PathPoint calf_top_four_cable_to_spine_stick_ground_y_two-P1: foot_stick_three (0 0.04 0)
      PathPoint calf_top_four_cable_to_spine_stick_ground_y_two-P2: ankle_bottom_four (0 -0.05 0)
    Thelen2003Muscle calf_top_three_to_spine_stick_ground_y_two: isDisabled=true
      PathPoint calf_top_cable_three_to_spine_stick_ground_y_two-P1: foot_stick_three (0 -0.04 0)
      PathPoint calf_top_cable_three_to_spine_stick_ground_y_two-P2: ankle_bottom_three (0 0.05 0)
    Thelen2003Muscle spine_stick_ground_to_foot_stick_three_y_two: isDisabled=true
      PathPoint spine_stick_ground_cable_to_foot_stick_three_y_two-P1: foot_stick_three (0 -0.04 0)
      PathPoint spine_stick_ground_cable_to_foot_stick_three_y_two-P2: spine_stick_ground (0 0.1 0)
    Thelen2003Muscle calf_top_one_to_spine_stick_ground_y_one: isDisabled=true
      PathPoint calf_top_one_cable_to_spine_stick_ground_y_one-P1: foot_stick_two (0 -0.04 0)
      PathPoint calf_top_one_cable_to_spine_stick_ground_y_one-P2: ankle_bottom_one (0 0.05 0)
    Thelen2003Muscle calf_top_two_to_spine_stick_ground_y_one: isDisabled=true
      PathPoint calf_top_two_cable_to_spine_stick_ground_y_one-P1: foot_stick_two (0 -0.04 0)
      PathPoint calf_top_two_cable_to_spine_stick_ground_y_one-P2: ankle_bottom_two (0 0.05 0)
    Thelen2003Muscle spine_stick_ground_to_foot_stick_two_y_one: isDisabled=true
      PathPoint spine_stick_ground_cable_to_foot_stick_two_y_one-P1: foot_stick_two (0 -0.04 0)
      PathPoint spine_stick_ground_cable_to_foot_stick_two_y_one-P2: spine_stick_ground (0 0.1 0)
    Thelen2003Muscle ankle_bottom_three_to_tibia: isDisabled=true
      PathPoint P1: ankle_bottom_three (0 0.07 0)
      PathPoint semimembranosus_cable_two-P2: tibia_stick (0 -0.24 0)
    Thelen2003Muscle ankle_bottom_four_to_tibia: isDisabled=true
      PathPoint P1: ankle_bottom_four (0 0.07 0)
      PathPoint P2: tibia_stick (0 -0.24 0)
    Thelen2003Muscle ankle_bottom_two_to_tibia: isDisabled=true
      PathPoint P1: ankle_bottom_two (0 0.07 0)
      PathPoint P2: tibia_stick (0 -0.24 0)
    Thelen2003Muscle ankle_bottom_one_to_tibia: isDisabled=true
      PathPoint P1: hip_top_one (0 0.07 0)
      PathPoint P2: femur_stick (0 -0.24 0)
    Ligament [values shared by the 43 below unless stated]: resting_length=0.03171 pcsa_force=1500
      force_length_curve: SimmSpline: x=(-1 -0.5 -0.2 0 0.01 0.02 0.03 0.04 0.05 0.06 0.07 0.1 0.13 0.15 0.2 0.4 0.7 1)
          y=(0 0 0 0 0.00083333 0.00333333 0.0075 0.0133333 0.0208333 0.03 0.04 0.07 0.1 0.12 0.17 0.37 0.67 0.97)
    Ligament quad_cable_one_ligament:
      PathPoint quad_cable_one-P1: knee_stick_one (0 -0.07 0)
      PathPoint quad_cable_one-P2: hip_top_two (0 -0.05 0)
    Ligament quad_cable_two_ligament:
      PathPoint quad_cable_two-P1: knee_stick_one (0 -0.07 0)
      PathPoint quad_cable_two-P2: hip_top_four (0 -0.05 0)
    Ligament knee_y_one_to_knee_one_ligament:
      PathPoint low_knee-P1: knee_stick_one (0 -0.07 0)
      PathPoint low_knee-P2: knee_stick_y_one (0 0.07 0)
    Ligament knee_y_two_to_knee_one_ligament:
      PathPoint knee_cable_y_two_to_one-P1: knee_stick_one (0 -0.07 0)
      PathPoint knee_cable_y_two_to_one-P2: knee_stick_y_two (0 0.07 0)
    Ligament knee_y_one_to_knee_two_ligament:
      PathPoint knee_cable_y_one_to_two-P1: knee_stick_two (0 -0.07 0)
      PathPoint knee_cable_y_one_to_two-P2: knee_stick_y_one (0 0.07 0)
    Ligament knee_y_two_to_knee_three_ligament:
      PathPoint knee_cable_y_two_to_three-P1: knee_stick_three (0 -0.07 0)
      PathPoint knee_cable_y_two_to_three-P2: knee_stick_y_two (0 0.07 0)
    Ligament knee_y_two_to_femur_ligament:
      PathPoint knee_cable_y_two_to_femur-P1: femur_stick (0 -0.25 0)
      PathPoint knee_cable_y_two_to_femur-P2: knee_stick_y_two (0 0.07 0)
    Ligament knee_y_one_to_femur_ligament:
      PathPoint knee_cable_y_one_to_femur-P1: femur_stick (0 -0.25 0)
      PathPoint knee_cable_y_one_to_femur-P2: knee_stick_y_one (0 0.07 0)
    Ligament calf_cable_one_ligament:
      PathPoint calf_cable_one-P1: knee_stick_three (0 -0.07 0)
      PathPoint calf_cable_one-P2: foot_stick_one (0 0.04 0)
    Ligament calf_cable_two_ligament:
      PathPoint calf_cable_two-P1: knee_stick_two (0 -0.07 0)
      PathPoint calf_cable_two-P2: foot_stick_one (0 0.04 0)
    Ligament front_calf_cable_ligament:
      PathPoint front_calf_cable-P1: knee_stick_one (0 -0.07 0)
      PathPoint front_calf_cable-P2: foot_stick_one (0 -0.04 0)
    Ligament knee_two_to_tibia_ligament:
      PathPoint knee_cable_two_to_tibia-P1: knee_stick_two (0 -0.07 0)
      PathPoint knee_cable_two_to_tibia-P2: tibia_stick (0 0.23 0)
    Ligament knee_three_to_tibia_ligament:
      PathPoint knee_cable_three_to_tibia-P1: knee_stick_three (0 -0.07 0)
      PathPoint knee_cable_three_to_tibia-P2: tibia_stick (0 0.23 0)
    Ligament hamstring_cable_one_ligament:
      PathPoint hamstring_cable_one-P1: knee_stick_two (0 -0.07 0)
      PathPoint hamstring_cable_one-P2: hip_top_one (0 -0.05 0)
    Ligament hamstring_cable_two_ligament:
      PathPoint hamstring_cable_two-P1: knee_stick_three (0 -0.07 0)
      PathPoint hamstring_cable_two-P2: hip_top_three (0 -0.05 0)
    Ligament psoas_cable_one_ligament:
      PathPoint psoas_cable_one-P1: hip_top_two (0 -0.07 0)
      PathPoint psoas_cable_one-P2: quad_stick (0.0102242 -0.07 0)
    Ligament psoas_cable_two_ligament:
      PathPoint psoas_cable_two-P1: hip_top_four (0 -0.07 0)
      PathPoint psoas_cable_two-P2: quad_stick (0.0102242 0.07 0)
    Ligament semimembranosus_cable_one_ligament:
      PathPoint semimembranosus_cable_one-P1: hip_top_one (0 -0.07 0)
      PathPoint semimembranosus_cable_one-P2: hamstring_stick (0.0102242 -0.07 0)
    Ligament semimembranosus_cable_two_ligament:
      PathPoint semimembranosus_cable_two-P1: hip_top_three (0 -0.07 0)
      PathPoint semimembranosus_cable_two-P2: hamstring_stick (0.0102242 0.07 0)
    Ligament hip_top_three_to_femur_ligament:
      PathPoint hip_top_three_cable_to_femur-P1: hip_top_three (0 -0.07 0)
      PathPoint hip_top_three_cable_to_femur-P2: femur_stick (0 0.24 0)
    Ligament hip_top_four_to_femur_ligament:
      PathPoint hip_top_four_cable_to_femur-P1: hip_top_four (0 -0.07 0)
      PathPoint hip_top_four_cable_to_femur-P2: femur_stick (0 0.24 0)
    Ligament hip_top_two_to_femur_ligament:
      PathPoint hip_top_two_cable_to_femur-P1: hip_top_two (0 -0.07 0)
      PathPoint hip_top_two_cable_to_femur-P2: femur_stick (0 0.24 0)
    Ligament hip_top_one_to_femur_ligament:
      PathPoint hip_top_one_cable_to_femur-P1: hip_top_one (0 -0.07 0)
      PathPoint hip_top_one_cable_to_femur-P2: femur_stick (0 0.24 0)
    Ligament hip_top_two_to_hip_stick_y_one_ligament:
      PathPoint hip_top_two_cable_to_hip_stick_y_one-P1: hip_stick_y_one (0 0.04 0)
      PathPoint hip_top_two_cable_to_hip_stick_y_one-P2: hip_top_two (0 -0.05 0)
    Ligament hip_top_one_to_hip_stick_y_one_ligament:
      PathPoint hip_top_one_cable_to_hip_stick_y_one-P1: hip_stick_y_one (0 0.04 0)
      PathPoint hip_top_one_cable_to_hip_stick_y_one-P2: hip_top_one (0 -0.05 0)
    Ligament hip_top_three_to_hip_stick_y_one_ligament:
      PathPoint hip_top_three_cable_to_hip_stick_y_one-P1: hip_stick_y_two (0 0.04 0)
      PathPoint hip_top_three_cable_to_hip_stick_y_one-P2: hip_top_three (0 -0.05 0)
    Ligament hip_top_four_to_hip_stick_y_one_ligament:
      PathPoint hip_top_four_cable_to_hip_stick_y_one-P1: hip_stick_y_two (0 0.04 0)
      PathPoint hip_top_four_cable_to_hip_stick_y_one-P2: hip_top_four (0 -0.05 0)
    Ligament spine_stick_to_hip_stick_y_one_ligament:
      PathPoint spine_stick_to_hip_stick_y_one-P1: hip_stick_y_one (0 0.04 0)
      PathPoint spine_stick_to_hip_stick_y_one-P2: spine_stick (0 -0.1 0)
    Ligament spine_stick_to_hip_stick_y_two_ligament:
      PathPoint spine_stick_to_hip_stick_y_two-P1: hip_stick_y_two (0 0.04 0)
      PathPoint spine_stick_to_hip_stick_y_two-P2: spine_stick (0 -0.1 0)
    Ligament ankle_cable_one_ground_ligament:
      PathPoint ankle_cable_one_ground-P1: ankle_bottom_two (0 0.07 0)
      PathPoint ankle_cable_one_ground-P2: quad_stick_ground (0.0102242 -0.07 0)
    Ligament ankle_cable_two_ground_ligament:
      PathPoint ankle_cable_two_ground-P1: ankle_bottom_four (0 0.07 0)
      PathPoint ankle_cable_two_ground-P2: quad_stick_ground (0.0102242 0.07 0)
    Ligament ankle_cable_three_ground_ligament:
      PathPoint ankle_cable_three_ground-P1: ankle_bottom_one (0 0.07 0)
      PathPoint ankle_cable_three_ground-P2: hamstring_stick_ground (0.0102242 -0.07 0)
    Ligament ankle_cable_four_ground_ligament:
      PathPoint ankle_cable_four_ground-P1: ankle_bottom_three (0 0.07 0)
      PathPoint ankle_cable_four_ground-P2: hamstring_stick_ground (0.0102242 0.07 0)
    Ligament ankle_top_four_to_spine_stick_ground_y_one_ligament:
      PathPoint ankle_top_four_cable_to_spine_stick_ground_y_one-P1: foot_stick_three (0 -0.04 0)
      PathPoint ankle_top_four_cable_to_spine_stick_ground_y_one-P2: ankle_bottom_four (0 0.05 0)
    Ligament ankle_top_three_to_spine_stick_ground_y_one_ligament:
      PathPoint ankle_top_three_cable_to_spine_stick_ground_y_one-P1: foot_stick_three (0 -0.04 0)
      PathPoint ankle_top_three_cable_to_spine_stick_ground_y_one-P2: ankle_bottom_three (0 0.05 0)
    Ligament spine_stick_ground_to_calf_stick_y_two_ligament:
      PathPoint spine_stick_ground_to_calf_stick_y_two-P1: foot_stick_three (0 -0.04 0)
      PathPoint spine_stick_ground_to_calf_stick_y_two-P2: spine_stick_ground (0 0.1 0)
    Ligament ankle_top_one_to_spine_stick_ground_y_one_ligament:
      PathPoint calf_top_one_cable_to_spine_stick_ground_y_one-P1: foot_stick_two (0 -0.04 0)
      PathPoint calf_top_one_cable_to_spine_stick_ground_y_one-P2: ankle_bottom_one (0 0.05 0)
    Ligament ankle_top_two_to_spine_stick_ground_y_one_ligament:
      PathPoint calf_top_two_cable_to_spine_stick_ground_y_one-P1: foot_stick_two (0 -0.04 0)
      PathPoint calf_top_two_cable_to_spine_stick_ground_y_one-P2: ankle_bottom_two (0 0.05 0)
    Ligament spine_stick_ground_to_calf_stick_y_one_ligament:
      PathPoint spine_stick_to_hip_stick_y_one-P1: foot_stick_two (0 -0.04 0)
      PathPoint spine_stick_to_hip_stick_y_one-P2: spine_stick_ground (0 0.1 0)
    Ligament ankle_bottom_three_to_tibia_ligament:
      PathPoint ankle_top_three_cable_to_tibia-P1: ankle_bottom_three (0 0.07 0)
      PathPoint ankle_top_three_cable_to_tibia-P2: tibia_stick (0 -0.24 0)
    Ligament ankle_bottom_four_to_tibia_ligament:
      PathPoint ankle_bottom_four_cable_to_tibia-P1: ankle_bottom_four (0 0.07 0)
      PathPoint ankle_bottom_four_cable_to_tibia-P2: tibia_stick (0 -0.24 0)
    Ligament ankle_bottom_two_to_tibia_ligament:
      PathPoint ankle_bottom_two_cable_to_tibia-P1: ankle_bottom_two (0 0.07 0)
      PathPoint ankle_bottom_two_cable_to_tibia-P2: tibia_stick (0 -0.24 0)
    Ligament ankle_bottom_one_to_tibia_ligament:
      PathPoint ankle_bottom_one_ground_to_tibia-P1: ankle_bottom_one (0 0.07 0)
      PathPoint ankle_bottom_one_ground_to_tibia-P2: femur_stick (0 -0.24 0)
